x := 27.6837 mm
y := 48.2302 mm
z := 49 mm
L1 := 100 mm
L2 := 111 mm
L3 := 51.5 mm
α := 30
θ_0 := atan(y/x)*180/π = 60.1446
θ_2 := acos((x^2 + z^2 - L1^2 - L2^2)/(2*L1*L2))*180/π = 149.63
θ_1 := atan((z*(L1 + L2*cos(θ_2)) - x*L2*sin(θ_2))/(x*(L1 + L2*cos(θ_2)) + z*L2*sin(θ_2)))*180/π = -84.068
θ_3 := α - θ_1 - θ_2 = -35.5616
